B_ν(ν, T) := 2*h*ν^3/c^2*1/(e^(h*ν/(k*T)) - 1)
B_λ(λ, T) := 2*h*c^2/λ^5*1/(e^(h*c/(λ*k*T)) - 1)
K1 := 2*h*c^2/10^-35
K2 := h*c/(k*10^-7)
Bs_λ(λ, T) := K1/(λ^5*(e^(K2/(λ*T)) - 1))
K1 = 1.19104e19 kg*m^4/s^3
K2 = 143878 m*K
B_λ(450*10^-9 m, 2700 K) = 4.64571e10 kg/(m*s^3)
Bs_λ(4.5 m, 2700 K) = 4.64571e10 kg/(m*s^3)
Bs_λ(4.5 m, 750 K) = 0.00197573 kg/(m*s^3)
