base := 12
range := 3
defaultEv := log(16*16*100, 2)
defaultEv = 14.6439
lower := base - range
upper := base + range
lower = 9
upper = 15
linear(x) := (x - lower)/(upper - lower)
lum(x) := 2^(x - 3)
exponential(x) := (x - lum(lower))/(lum(upper) - lum(lower))
lum(lower) = 64
lum(upper) = 4096
# [plot: linear(x) vs x, lower, upper, base]
# [plot: exponential(x) vs x, lum(lower), lum(upper), lum(base)]
'
