N := 2.545*10^25
λr := 650*10^-9
n := 1.0003
pn := 0.035
λg := 535*10^-9
λb := 450*10^-9
K := 8*π^3*(n^2 - 1)^2/(3*N)*((6 + 3*pn)/(6 - 7*pn))
K = 1.24109e-30
c(T) := (0.65*T - 0.65)*10^-16
c(1) = 0
βr(λ) := K/λ^4
βm(λ, T) := 0.434*0.0092*c(T)*π*(2*π/λ)^2
c(10) = 5.85e-16
t := 2
βr(λr) = 6.95265e-6
βm(λr, t) = 7.61858e-5
βr(λg) = 1.51492e-5
βm(λg, t) = 0.000112459
βr(λb) = 3.02659e-5
βm(λb, t) = 0.000158955
